Sun Sep 22 19:01:08 UTC 2024
;; Fitting common example dataset from:
;; Grasela and Donn (1985), Developmental
;; Pharmacology and Therapeutics, 8, 374-383.
;; Description: Reparameterized final model
$PROB PPK Model for Phenobarbitol in neonates

$INPUT
ID TIME AMT WT APGR DV MDV EVID
$DATA data.csv IGNORE=@
$SUBROUTINE ADVAN1 TRANS2

$PK
TVCL = THETA(1)*WT
MU_1 = LOG(TVCL)
CL = EXP(MU_1 + ETA(1))

TVV = THETA(2)*WT
MU_2 = LOG(TVV)
V = EXP(MU_2 + ETA(2))

S1 = V
RUVADD = THETA(3)

$ERROR
IPRED = F

W = RUVADD

Y =  IPRED+W*EPS(1)
IRES = DV - IPRED
IWRES = IRES/W

$THETA
(0, 0.01) ; CLpkg
(0, 1) ; Vpkg
(0, 0.1) ; RUVADD

$OMEGA BLOCK(2)
1 ; IIVCL
0.1 1 ; IIVV

$SIGMA
1 FIX

$ESTIMATION METH=SAEM INTER NBURN=10000 NITER=1000 ISAMPLE=5 IACCEPT=0.3 CINTERVAL=25 CTYPE=3 NOABORT PRINT=100
$ESTIMATION METH=IMP INTER PRINT=1 NITER=25 ISAMPLE=10000 EONLY=1 IACCEPT=0.3  MAPITER=0
$COV	PRINT=E UNCONDITIONAL

; Monolithic table
$TAB ID TIME AMT WT APGR MDV EVID IPRED IRES IWRES
	 CL V ETAS(1:LAST)
	 PRED CRES CWRES NPDE NOPRINT FORMAT=s1PE13.7
	 FILE=run16tab

NM-TRAN MESSAGES
 WARNINGS AND ERRORS (IF ANY) FOR PROBLEM    1
 (WARNING  2) NM-TRAN INFERS THAT THE DATA ARE POPULATION.
 (MU_WARNING 26) DATA ITEM(S) USED IN DEFINITION OF MU_(S) SHOULD BE CONSTANT FOR INDIV. REC.:
  WT

1NONLINEAR MIXED EFFECTS MODEL PROGRAM (NONMEM) VERSION 7.5.0
 ORIGINALLY DEVELOPED BY STUART BEAL, LEWIS SHEINER, AND ALISON BOECKMANN
 CURRENT DEVELOPERS ARE ROBERT BAUER, ICON DEVELOPMENT SOLUTIONS,
 AND ALISON BOECKMANN. IMPLEMENTATION, EFFICIENCY, AND STANDARDIZATION
 PERFORMED BY NOUS INFOSYSTEMS.
 PROBLEM NO.:         1
 PPK Model for Phenobarbitol in neonates
 TOT. NO. OF OBS RECS:      155
 TOT. NO. OF INDIVIDUALS:       59
 ONE COMPARTMENT MODEL (ADVAN1)
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 #TBLN:      1
 #METH: Stochastic Approximation Expectation-Maximization
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
 #TERM:
 STOCHASTIC PORTION WAS COMPLETED
 REDUCED STOCHASTIC PORTION WAS COMPLETED

 ETABAR IS THE ARITHMETIC MEAN OF THE ETA-ESTIMATES,
 AND THE P-VALUE IS GIVEN FOR THE NULL HYPOTHESIS THAT THE TRUE MEAN IS 0.

 ETABAR:         6.5270E-06  1.9415E-06
 SE:             1.9093E-02  1.8509E-02
 N:                      59          59

 P VAL.:         9.9973E-01  9.9992E-01

 ETASHRINKSD(%)  2.0287E+01  1.1846E+01
 ETASHRINKVR(%)  3.6458E+01  2.2289E+01
 EBVSHRINKSD(%)  2.0294E+01  1.1849E+01
 EBVSHRINKVR(%)  3.6469E+01  2.2295E+01
 RELATIVEINF(%)  1.4774E+01  3.0771E+01
 EPSSHRINKSD(%)  1.9141E+01
 EPSSHRINKVR(%)  3.4618E+01


 TOTAL DATA POINTS NORMALLY DISTRIBUTED (N):          155
 N*LOG(2PI) CONSTANT TO OBJECTIVE FUNCTION:    284.87094529344853
 OBJECTIVE FUNCTION VALUE WITHOUT CONSTANT:    93.817415427248264
 OBJECTIVE FUNCTION VALUE WITH CONSTANT:       378.68836072069678
 REPORTED OBJECTIVE FUNCTION DOES NOT CONTAIN CONSTANT

 TOTAL EFFECTIVE ETAS (NIND*NETA):                           118
 NIND*NETA*LOG(2PI) CONSTANT TO OBJECTIVE FUNCTION:    216.86949383630275
 OBJECTIVE FUNCTION VALUE WITHOUT CONSTANT:    93.817415427248264
 OBJECTIVE FUNCTION VALUE WITH CONSTANT:       310.68690926355100
 REPORTED OBJECTIVE FUNCTION DOES NOT CONTAIN CONSTANT


 #TERE:
 Elapsed estimation  time in seconds:    58.85
 Elapsed covariance  time in seconds:     0.01

 ********************                STOCHASTIC APPROXIMATION EXPECTATION-MAXIMIZATION               ********************
 #OBJT:**************                        FINAL VALUE OF LIKELIHOOD FUNCTION                      ********************
 #OBJV:********************************************       93.817       **************************************************

 ********************                STOCHASTIC APPROXIMATION EXPECTATION-MAXIMIZATION               ********************
 ********************                             FINAL PARAMETER ESTIMATE                           ********************

 THETA - VECTOR OF FIXED EFFECTS PARAMETERS   *********
         TH 1      TH 2      TH 3
         4.79E-03  1.00E+00  2.80E+00

 OMEGA - COV MATRIX FOR RANDOM EFFECTS - ETAS  ********
         ETA1      ETA2
 ETA1
+        3.44E-02
 ETA2
+        2.26E-02  2.65E-02

 SIGMA - COV MATRIX FOR RANDOM EFFECTS - EPSILONS  ****
         EPS1
 EPS1
+        1.00E+00

 OMEGA - CORR MATRIX FOR RANDOM EFFECTS - ETAS  *******
         ETA1      ETA2
 ETA1
+        1.86E-01
 ETA2
+        7.49E-01  1.63E-01

 SIGMA - CORR MATRIX FOR RANDOM EFFECTS - EPSILONS  ***
         EPS1
 EPS1
+        1.00E+00

 ********************                STOCHASTIC APPROXIMATION EXPECTATION-MAXIMIZATION               ********************
 ********************                          STANDARD ERROR OF ESTIMATE (S)                        ********************

 THETA - VECTOR OF FIXED EFFECTS PARAMETERS   *********
         TH 1      TH 2      TH 3
         2.10E-04  2.89E-02  2.84E-01

 OMEGA - COV MATRIX FOR RANDOM EFFECTS - ETAS  ********
         ETA1      ETA2
 ETA1
+        1.91E-02
 ETA2
+        1.08E-02  8.25E-03

 SIGMA - COV MATRIX FOR RANDOM EFFECTS - EPSILONS  ****
         EPS1
 EPS1
+        0.00E+00

 OMEGA - CORR MATRIX FOR RANDOM EFFECTS - ETAS  *******
         ETA1      ETA2
 ETA1
+        5.15E-02
 ETA2
+        4.39E-01  2.54E-02

 SIGMA - CORR MATRIX FOR RANDOM EFFECTS - EPSILONS  ***
         EPS1
 EPS1
+       .........

 ********************                STOCHASTIC APPROXIMATION EXPECTATION-MAXIMIZATION               ********************
 ********************                        COVARIANCE MATRIX OF ESTIMATE (S)                       ********************

            TH 1      TH 2      TH 3      OM11      OM12      OM22      SG11
 TH 1
+        4.40E-08
 TH 2
+        6.29E-07  8.37E-04
 TH 3
+        1.33E-06 -1.73E-03  8.07E-02
 OM11
+       -7.63E-09 -9.67E-06 -2.77E-03  3.65E-04
 OM12
+        1.02E-07 -9.35E-05  1.39E-03  8.48E-06  1.18E-04
 OM22
+       -2.98E-07 -3.57E-05 -1.12E-03  4.48E-05  1.15E-06  6.81E-05
 SG11
+       ......... ......... ......... ......... ......... ......... .........

 ********************                STOCHASTIC APPROXIMATION EXPECTATION-MAXIMIZATION               ********************
 ********************                        CORRELATION MATRIX OF ESTIMATE (S)                      ********************

            TH 1      TH 2      TH 3      OM11      OM12      OM22      SG11
 TH 1
+        2.10E-04
 TH 2
+        1.04E-01  2.89E-02
 TH 3
+        2.23E-02 -2.10E-01  2.84E-01
 OM11
+       -1.90E-03 -1.75E-02 -5.10E-01  1.91E-02
 OM12
+        4.47E-02 -2.98E-01  4.51E-01  4.09E-02  1.08E-02
 OM22
+       -1.72E-01 -1.50E-01 -4.76E-01  2.84E-01  1.28E-02  8.25E-03
 SG11
+       ......... ......... ......... ......... ......... ......... .........
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
 ********************                STOCHASTIC APPROXIMATION EXPECTATION-MAXIMIZATION               ********************
 ********************                    EIGENVALUES OF COR MATRIX OF ESTIMATE (S)                   ********************

             1         2         3         4         5         6
         2.24E-01  6.25E-01  7.16E-01  1.04E+00  1.43E+00  1.97E+00
 #TBLN:      2
 #METH: Objective Function Evaluation by Importance Sampling
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
 #TERM:
 EXPECTATION ONLY PROCESS WAS NOT COMPLETED

 ETABAR IS THE ARITHMETIC MEAN OF THE ETA-ESTIMATES,
 AND THE P-VALUE IS GIVEN FOR THE NULL HYPOTHESIS THAT THE TRUE MEAN IS 0.

 ETABAR:         2.3136E-04 -2.1164E-04
 SE:             1.9271E-02  1.8501E-02
 N:                      59          59

 P VAL.:         9.9042E-01  9.9087E-01

 ETASHRINKSD(%)  1.9542E+01  1.1882E+01
 ETASHRINKVR(%)  3.5265E+01  2.2352E+01
 EBVSHRINKSD(%)  2.0426E+01  1.1738E+01
 EBVSHRINKVR(%)  3.6680E+01  2.2098E+01
 RELATIVEINF(%)  1.3932E+01  2.9827E+01
 EPSSHRINKSD(%)  1.9269E+01
 EPSSHRINKVR(%)  3.4825E+01


 TOTAL DATA POINTS NORMALLY DISTRIBUTED (N):          155
 N*LOG(2PI) CONSTANT TO OBJECTIVE FUNCTION:    284.87094529344853
 OBJECTIVE FUNCTION VALUE WITHOUT CONSTANT:    587.71420078592939
 OBJECTIVE FUNCTION VALUE WITH CONSTANT:       872.58514607937786
 REPORTED OBJECTIVE FUNCTION DOES NOT CONTAIN CONSTANT

 TOTAL EFFECTIVE ETAS (NIND*NETA):                           118


 #TERE:
 Elapsed estimation  time in seconds:    70.44
 Elapsed covariance  time in seconds:    17.24

 ********************               OBJECTIVE FUNCTION EVALUATION BY IMPORTANCE SAMPLING             ********************
 #OBJT:**************                        FINAL VALUE OF OBJECTIVE FUNCTION                       ********************
 #OBJV:********************************************      587.714       **************************************************

 ********************               OBJECTIVE FUNCTION EVALUATION BY IMPORTANCE SAMPLING             ********************
 ********************                             FINAL PARAMETER ESTIMATE                           ********************

 THETA - VECTOR OF FIXED EFFECTS PARAMETERS   *********
         TH 1      TH 2      TH 3
         4.79E-03  1.00E+00  2.80E+00

 OMEGA - COV MATRIX FOR RANDOM EFFECTS - ETAS  ********
         ETA1      ETA2
 ETA1
+        3.44E-02
 ETA2
+        2.26E-02  2.65E-02

 SIGMA - COV MATRIX FOR RANDOM EFFECTS - EPSILONS  ****
         EPS1
 EPS1
+        1.00E+00

 OMEGA - CORR MATRIX FOR RANDOM EFFECTS - ETAS  *******
         ETA1      ETA2
 ETA1
+        1.86E-01
 ETA2
+        7.49E-01  1.63E-01

 SIGMA - CORR MATRIX FOR RANDOM EFFECTS - EPSILONS  ***
         EPS1
 EPS1
+        1.00E+00

 ********************               OBJECTIVE FUNCTION EVALUATION BY IMPORTANCE SAMPLING             ********************
 ********************                         STANDARD ERROR OF ESTIMATE (RSR)                       ********************

 THETA - VECTOR OF FIXED EFFECTS PARAMETERS   *********
         TH 1      TH 2      TH 3
         2.40E-04  2.67E-02  2.57E-01

 OMEGA - COV MATRIX FOR RANDOM EFFECTS - ETAS  ********
         ETA1      ETA2
 ETA1
+        1.64E-02
 ETA2
+        8.47E-03  8.63E-03

 SIGMA - COV MATRIX FOR RANDOM EFFECTS - EPSILONS  ****
         EPS1
 EPS1
+        0.00E+00

 OMEGA - CORR MATRIX FOR RANDOM EFFECTS - ETAS  *******
         ETA1      ETA2
 ETA1
+        4.43E-02
 ETA2
+        2.46E-01  2.65E-02

 SIGMA - CORR MATRIX FOR RANDOM EFFECTS - EPSILONS  ***
         EPS1
 EPS1
+       .........

 ********************               OBJECTIVE FUNCTION EVALUATION BY IMPORTANCE SAMPLING             ********************
 ********************                       COVARIANCE MATRIX OF ESTIMATE (RSR)                      ********************

            TH 1      TH 2      TH 3      OM11      OM12      OM22      SG11
 TH 1
+        5.77E-08
 TH 2
+        1.60E-07  7.14E-04
 TH 3
+        1.26E-05  1.56E-03  6.61E-02
 OM11
+       -7.31E-07  1.92E-05 -8.77E-04  2.70E-04
 OM12
+        6.65E-07  4.11E-05 -6.83E-05  8.20E-05  7.18E-05
 OM22
+       -9.32E-08  7.49E-05  1.77E-04 -4.51E-05 -8.18E-06  7.45E-05
 SG11
+       ......... ......... ......... ......... ......... ......... .........

 ********************               OBJECTIVE FUNCTION EVALUATION BY IMPORTANCE SAMPLING             ********************
 ********************                       CORRELATION MATRIX OF ESTIMATE (RSR)                     ********************

            TH 1      TH 2      TH 3      OM11      OM12      OM22      SG11
 TH 1
+        2.40E-04
 TH 2
+        2.50E-02  2.67E-02
 TH 3
+        2.03E-01  2.27E-01  2.57E-01
 OM11
+       -1.85E-01  4.38E-02 -2.08E-01  1.64E-02
 OM12
+        3.26E-01  1.81E-01 -3.13E-02  5.89E-01  8.47E-03
 OM22
+       -4.50E-02  3.25E-01  7.99E-02 -3.18E-01 -1.12E-01  8.63E-03
 SG11
+       ......... ......... ......... ......... ......... ......... .........
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
 ********************               OBJECTIVE FUNCTION EVALUATION BY IMPORTANCE SAMPLING             ********************
 ********************                   EIGENVALUES OF COR MATRIX OF ESTIMATE (RSR)                  ********************

             1         2         3         4         5         6
         2.10E-01  5.12E-01  8.27E-01  1.17E+00  1.50E+00  1.77E+00
 Elapsed postprocess time in seconds:     0.11
 Elapsed finaloutput time in seconds:     0.03
 #CPUT: Total CPU Time in Seconds,      146.450
